# Input:
D := 508*mm
t := 20 mm
## Tube
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Ax := π/4*(D^2 - (D - 2*t)^2)
Ax = 30661.9 mm^2
Iy := π/64*(D^4 - (D - 2*t)^4)
Iy = 914277855 mm^4
r := sqrt(Iy/Ax)
r = 172.679 mm
J := π*(D - t)^3*t/4
J = 1825490 m*mm^3
Cy := D/2
Cy = 254 mm
S := Iy/Cy
S = 3599519 mm^3
Z := 1/6*(D^3 - (D - 2*t)^3)
Z = 4765547 mm^3
SF := S/Z
SF = 0.755321
# Input:
B := 200*mm
D := 430*mm
t := 12 mm
## Hollow box
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Ax := B*D - (B - 2*t)*(D - 2*t)
Ax = 14544 mm^2
Iy := (B*D^3 - (B - 2*t)*(D - 2*t)^3)/12
Iy = 343573232 mm^4
Iz := (D*B^3 - (D - 2*t)*(B - 2*t)^3)/12
Iz = 102214912 mm^4
K := (B - t)*(D - t)^2*t
K = 394177344 mm^4
ry := sqrt(Iy/Ax)
rz := sqrt(Iz/Ax)
ry = 153.698 mm
rz = 83.833 mm
Sy := Iy/(D/2)
Sz := Iz/(B/2)
Sy = 1598015 mm^3
Sz = 1022149 mm^3
Zy := (B*D^2 - (B - 2*t)*(D - 2*t)^2)/4
Zy = 1992216 mm^3
Zz := (D*B^2 - (D - 2*t)*(B - 2*t)^2)/4
Zz = 1155936 mm^3
SFy := Zy*D/(2*Iy)
SFz := Zz*B/(2*Iz)
SFy = 1.24668
SFz = 1.13089
# Input:
B := 120*mm
D := 375*mm
tf := 12 mm
tw := 9 mm
## Channel
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Ax := B*D - (D - 2*tf)*(B - tw)
Ax = 6039 mm^2
Cy := D/2
Cy = 187.5 mm
Cz := (2*B^2*tf + (D - 2*tf)*tw^2)/(2*B*D - 2*(D - 2*tf)*(B - tw))
Cz = 30.968 mm
cn := 2*tf*(B - tw)
Iy := (B*D^3 - (B - tw)*(D - 2*tf)^3)/12
Iy = 127340903 mm^4
rs := D*tw
zza := tf*(B - tw)^2/2 - D^2*tw^2/(8*tf) + D*tw*B/2
Iz := (2*tf*B^3 - (D - 2*tf)*tw^3)/12 + 2*B*tf*(B/2 - Cz)^2 + tw*(D - 2*tf)*(Cz - tw/2)^2
Iz = 8075158 mm^4
zzb := tw^2*D/4 + tf*(B - tw)*(B - tf*(B - tw)/D)
ry := sqrt(Iy/Ax)
rz := sqrt(Iz/Ax)
rz = 36.5673 mm
ry = 145.212 mm
Sy = 1598015 mm^3
Sy := Iy/Cy
Zz := if(cn ≤ rs, zza, zzb)
Zz = 157774 mm^3
Sz = 1022149 mm^3
Sz := Iz/Cz
Zy := D^2*tw/4 + tf*(B - tw)*(D - tf)
Zy = 799922 mm^3
# Input:
B := 220*mm
D := 400*mm
tf := 12 mm
tw := 9 mm
d := D - 2*tf
## I section (Equal)
b := B - tw
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Ax := B*D - b*d
Ax = 8664 mm^2
Iy := (B*D^3 - b*d^3)/12
Iy = 238649472 mm^4
Iz := (D*B^3 - d*b^3)/12
Iz = 60590162 mm^4
K := (2*B*tf^3 + D*tw^3)/3
K = 350640 mm^4
ry := sqrt(Iy/Ax)
rz := sqrt(Iz/Ax)
ry = 165.967 mm
rz = 83.6261 mm
Sy := Iy/(D/2)
Sz := Iz/(B/2)
Sy = 1193247 mm^3
Sz = 550820 mm^3
ry = 165.967 mm
Zy = 799922 mm^3
Zy := (tw*d^2/4) + B*tf*(d + tf)
Zz := (tf*B^2/2) + (d*tw^2/4)
Zz = 298014 mm^3
SFy = 1.24668
SFy := Zy*(D/2)/Iy
SFz := Zz*B/2/Iz
SFz = 0.541037
# Input:
B := 220*mm
D := 400*mm
tf := 12 mm
tw := 10 mm
## T section
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d := D - tf
Cy := (B*tf^2 + tw*d*(2*tf + d))/(2*B*tf + d*tw)
Cy = 177.974 mm
Cz := B/2
Cz = 110 mm
Ax := B*tf + d*tw
Ax = 6520 mm^2
Iy := (tw*Cy^3 + B*(D - Cy)^3 - (B - tw)*(D - Cy - tf)^3)/3
Iy = 172905832 mm^4
Iz := (tf^3*B + tw^3*D)/3
ry := sqrt(Iy/Ax)
rz := sqrt(Iz/Ax)
Iz = 260053 mm^4
Sy := Iy/Cy
Sz := Iz/Cz
ry = 162.847 mm
rz = 6.3155 mm
Sy = 971524 mm^3
K := (tf*B^3 + d*tw^3)/3
Sz = 2364.12 mm^3
K = 42721333 mm^4
